<Lems>

    <!--

        This LEMS file has been automatically generated using PyNeuroML v0.5.0 (libNeuroML v0.2.50)

     -->

    <!-- Specify which component to run -->
    <Target component="SimABC" reportFile="report.SimABC.txt"/>

    <!-- Include core NeuroML2 ComponentType definitions -->
    <Include file="Cells.xml"/>
    <Include file="Networks.xml"/>
    <Include file="Simulation.xml"/>

    <Include file="PyNN.xml"/>
    <Include file="ABC.net.nml"/>
    <Include file="/home/padraig/neuroConstruct/osb/showcase/PsyNeuLinkShowcase/NeuroML2/PNL.xml"/>
    <Include file="/home/padraig/neuroConstruct/osb/showcase/PsyNeuLinkShowcase/NeuroML2/inputs.nml"/>

    <Simulation id="SimABC" length="1.0ms" step="0.1ms" target="ABC" seed="123">  <!-- Note seed: ensures same random numbers used every run -->

        <Display id="A_0_INPUT" title="Plots of A_0_INPUT" timeScale="1ms" xmin="-0.1" xmax="1.1" ymin="-1" ymax="1">
            <Line id="A_0_a_INPUT" quantity="A/0/a/INPUT" scale="1" color="#6aa799" timeScale="1ms"/>
        </Display>

        <Display id="A_0_OUTPUT" title="Plots of A_0_OUTPUT" timeScale="1ms" xmin="-0.1" xmax="1.1" ymin="-1" ymax="1">
            <Line id="A_0_a_OUTPUT" quantity="A/0/a/OUTPUT" scale="1" color="#029a72" timeScale="1ms"/>
        </Display>

        <Display id="A_input_0_INPUT" title="Plots of A_input_0_INPUT" timeScale="1ms" xmin="-0.1" xmax="1.1" ymin="-1" ymax="1">
            <Line id="A_input_0_a_input_INPUT" quantity="A_input/0/a_input/INPUT" scale="1" color="#d340bb" timeScale="1ms"/>
        </Display>

        <Display id="A_input_0_OUTPUT" title="Plots of A_input_0_OUTPUT" timeScale="1ms" xmin="-0.1" xmax="1.1" ymin="-1" ymax="1">
            <Line id="A_input_0_a_input_OUTPUT" quantity="A_input/0/a_input/OUTPUT" scale="1" color="#4c73a9" timeScale="1ms"/>
        </Display>

        <Display id="B_0_INPUT" title="Plots of B_0_INPUT" timeScale="1ms" xmin="-0.1" xmax="1.1" ymin="-1" ymax="1">
            <Line id="B_0_b_INPUT" quantity="B/0/b/INPUT" scale="1" color="#5e503a" timeScale="1ms"/>
        </Display>

        <Display id="B_0_OUTPUT" title="Plots of B_0_OUTPUT" timeScale="1ms" xmin="-0.1" xmax="1.1" ymin="-1" ymax="1">
            <Line id="B_0_b_OUTPUT" quantity="B/0/b/OUTPUT" scale="1" color="#3193ca" timeScale="1ms"/>
        </Display>

        <Display id="C_0_INPUT" title="Plots of C_0_INPUT" timeScale="1ms" xmin="-0.1" xmax="1.1" ymin="-1" ymax="1">
            <Line id="C_0_c_INPUT" quantity="C/0/c/INPUT" scale="1" color="#90e5e9" timeScale="1ms"/>
        </Display>

        <Display id="C_0_OUTPUT" title="Plots of C_0_OUTPUT" timeScale="1ms" xmin="-0.1" xmax="1.1" ymin="-1" ymax="1">
            <Line id="C_0_c_OUTPUT" quantity="C/0/c/OUTPUT" scale="1" color="#29645f" timeScale="1ms"/>
        </Display>

        <OutputFile id="A_0_INPUT_dat" fileName="A_0.INPUT.dat">
            <OutputColumn id="A_0_a_INPUT" quantity="A/0/a/INPUT"/>
        </OutputFile>

        <OutputFile id="A_0_OUTPUT_dat" fileName="A_0.OUTPUT.dat">
            <OutputColumn id="A_0_a_OUTPUT" quantity="A/0/a/OUTPUT"/>
        </OutputFile>

        <OutputFile id="A_input_0_INPUT_dat" fileName="A_input_0.INPUT.dat">
            <OutputColumn id="A_input_0_a_input_INPUT" quantity="A_input/0/a_input/INPUT"/>
        </OutputFile>

        <OutputFile id="A_input_0_OUTPUT_dat" fileName="A_input_0.OUTPUT.dat">
            <OutputColumn id="A_input_0_a_input_OUTPUT" quantity="A_input/0/a_input/OUTPUT"/>
        </OutputFile>

        <OutputFile id="B_0_INPUT_dat" fileName="B_0.INPUT.dat">
            <OutputColumn id="B_0_b_INPUT" quantity="B/0/b/INPUT"/>
        </OutputFile>

        <OutputFile id="B_0_OUTPUT_dat" fileName="B_0.OUTPUT.dat">
            <OutputColumn id="B_0_b_OUTPUT" quantity="B/0/b/OUTPUT"/>
        </OutputFile>

        <OutputFile id="C_0_INPUT_dat" fileName="C_0.INPUT.dat">
            <OutputColumn id="C_0_c_INPUT" quantity="C/0/c/INPUT"/>
        </OutputFile>

        <OutputFile id="C_0_OUTPUT_dat" fileName="C_0.OUTPUT.dat">
            <OutputColumn id="C_0_c_OUTPUT" quantity="C/0/c/OUTPUT"/>
        </OutputFile>

    </Simulation>

</Lems>
